*Heading
** Job name: thermal Model name: thermal
** Generated by: Abaqus/CAE 2022
*Preprint, echo=NO, model=NO, history=NO, contact=NO
**
** PARTS
**
*Part, name=Part-1
*Node
      1,   41.3793106,   378.746277
      2,          40.,   366.121429
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*Element, type=DC2D8
   1,     1,   112,  1860,  1127,  7529,  7530,  7531,  7532
   2,   112,   113,  1861,  1860,  7533,  7534,  7535,  7530
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*Nset, nset=All, generate
     1,  21876,      1
*Elset, elset=All, generate
    1,  6820,     1
*Nset, nset=Base
     1,     2,     3,     4,     5,     6
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*Elset, elset=Base
    1,    2,    3,    4,    5,    6
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*Nset, nset=Weld
     7,    12,    15,    17,    18,    19
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*Elset, elset=Weld
 1758, 1759, 1760, 1761, 1762, 1763
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*Nset, nset=Weld1
    38,    39,    40,    42,    44,    49
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*Elset, elset=Weld1, generate
 6169,  6820,     1
*Nset, nset=Weld2
    15,    17,    18,    19,    20,    21
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*Elset, elset=Weld2
 1758, 1759, 1760, 1761, 1762, 1763
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*Nset, nset=edge_seeds_bias
     1,     2,     4,     6,    23,    24
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*Elset, elset=edge_seeds_bias
 1822, 1823, 1825, 1827, 1829, 1830
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** Section: Section-1
*Solid Section, elset=All, material=Base_X60_1_umatht
,
*End Part
**
**
** ASSEMBLY
**
*Assembly, name=Assembly
**
*Instance, name=Part-1-1, part=Part-1
*End Instance
**
*Nset, nset=heating1, instance=Part-1-1
    39,    40,    42,    44,    49,    91
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*Elset, elset=heating1, instance=Part-1-1
 2584, 2585, 2586, 2587, 2615, 2799
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*Nset, nset=heating2, instance=Part-1-1
     7,    12,    15,    17,    28,    36
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*Elset, elset=heating2, instance=Part-1-1
 1732, 1734, 1736, 1738, 1740, 1742
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*Elset, elset=_outer_cooldown1_S2, internal, instance=Part-1-1
    3,    6,    9,   12,   15,   18
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*Elset, elset=_outer_cooldown1_S4, internal, instance=Part-1-1
    1,    4,    7,   10,   13,   16
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*Elset, elset=_outer_cooldown1_S3, internal, instance=Part-1-1
 1822, 1825, 1829, 1830, 1858, 1869
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*Elset, elset=_outer_cooldown1_S1, internal, instance=Part-1-1
 1823, 1827, 1835, 1863, 1865, 1866
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*Surface, type=ELEMENT, name=outer_cooldown1
_outer_cooldown1_S2, S2
_outer_cooldown1_S4, S4
_outer_cooldown1_S3, S3
_outer_cooldown1_S1, S1
*Elset, elset=_outer_cooldown2_S3, internal, instance=Part-1-1
 1772, 1775, 1776, 1786, 1791, 1822
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*Elset, elset=_outer_cooldown2_S1, internal, instance=Part-1-1
 1774, 1781, 1805, 1823, 1827, 1835
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*Elset, elset=_outer_cooldown2_S2, internal, instance=Part-1-1
    3,    6,    9,   12,   15,   18
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*Elset, elset=_outer_cooldown2_S4, internal, instance=Part-1-1
    1,    4,    7,   10,   13,   16
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*Surface, type=ELEMENT, name=outer_cooldown2
_outer_cooldown2_S3, S3
_outer_cooldown2_S1, S1
_outer_cooldown2_S2, S2
_outer_cooldown2_S4, S4
*Elset, elset=_outer_heating1_S2, internal, instance=Part-1-1
    3,    6,    9,   12,   15,   18
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*Elset, elset=_outer_heating1_S4, internal, instance=Part-1-1
    1,    4,    7,   10,   13,   16
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*Elset, elset=_outer_heating1_S3, internal, instance=Part-1-1
 1822, 1825, 1829, 1830, 1858, 1869
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*Elset, elset=_outer_heating1_S1, internal, instance=Part-1-1
 1823, 1827, 1835, 1863, 1865, 1866
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*Surface, type=ELEMENT, name=outer_heating1
_outer_heating1_S2, S2
_outer_heating1_S4, S4
_outer_heating1_S3, S3
_outer_heating1_S1, S1
*Elset, elset=_outer_heating2_S2, internal, instance=Part-1-1
    3,    6,    9,   12,   15,   18
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*Elset, elset=_outer_heating2_S4, internal, instance=Part-1-1
    1,    4,    7,   10,   13,   16
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*Elset, elset=_outer_heating2_S3, internal, instance=Part-1-1
 1822, 1825, 1829, 1830, 1858, 1869
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*Elset, elset=_outer_heating2_S1, internal, instance=Part-1-1
 1823, 1827, 1835, 1863, 1865, 1866
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*Surface, type=ELEMENT, name=outer_heating2
_outer_heating2_S2, S2
_outer_heating2_S4, S4
_outer_heating2_S3, S3
_outer_heating2_S1, S1
*End Assembly
*Amplitude, name=Constant
             0.,              1.,              1.,              1.
**
** MATERIALS
**
*Material, name=Base_X60_1_CR1
*Conductivity
 0.048357,  25.
 0.048336,  30.
 0.048313,  35.
 0.048287,  40.
 0.048258,  45.
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 0.035061,1590.
*Density
 0.007834,  25.
 0.007832,  30.
 0.007831,  35.
  0.00783,  40.
 0.007828,  45.
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 0.006905,1590.
*Depvar
     14,
*Specific Heat
  0.44661, 25.
  0.44885, 30.
  0.45106, 35.
  0.45323, 40.
  0.45538, 45.
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  0.59763,820.
*User Defined Field
*Material, name=Base_X60_1_CR10
*Conductivity
 0.048989,  25.
 0.048958,  30.
 0.048925,  35.
 0.048889,  40.
  0.04885,  45.
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 0.035061,1590.
*Density
 0.007834,  25.
 0.007833,  30.
 0.007831,  35.
  0.00783,  40.
 0.007828,  45.
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 0.006905,1590.
*Depvar
     14,
*Specific Heat
  0.44661, 25.
  0.44885, 30.
  0.45106, 35.
  0.45323, 40.
  0.45538, 45.
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  0.59763,820.
*User Defined Field
*Material, name=Base_X60_1_CR100
*Conductivity
 0.047232,  25.
 0.047246,  30.
 0.047257,  35.
 0.047264,  40.
 0.047267,  45.
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 0.035061,1590.
*Density
 0.007817,  25.
 0.007816,  30.
 0.007814,  35.
 0.007813,  40.
 0.007811,  45.
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 0.006905,1590.
*Depvar
     14,
*Specific Heat
 0.446611, 25.
 0.448851, 30.
 0.451061, 35.
 0.453231, 40.
 0.455381, 45.
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  0.59763,820.
*User Defined Field
*Material, name=Base_X60_1_umatht
*Density
1.,   0.
1.,1000.
*Depvar
     14,
*User Defined Field
*User Material, constants=1, type=THERMAL
0.,
*Time Points, name=TimePoints-1, GENERATE
0.5, 20., 0.5
20., 25., 2.5
25., 50., 5.
60., 100., 10.
130., 600., 30.
700., 2000., 100.
**
** PHYSICAL CONSTANTS
**
*Physical Constants, absolute zero=-273.15, stefan boltzmann=5.67e-14
**
** PREDEFINED FIELDS
**
** Name: Gsize1_Weld   Type: Field
*Initial Conditions, type=FIELD, variable=6
Part-1-1.Weld, 100.
** Name: Gsize2_Base   Type: Field
*Initial Conditions, type=FIELD, variable=6
Part-1-1.Base, 30.
** Name: Hardness   Type: Field
*Initial Conditions, type=FIELD, variable=7
Part-1-1.All, 165.
** Name: frac_a   Type: Field
*Initial Conditions, type=FIELD, variable=5
Part-1-1.Weld, 1.
** Name: frac_f   Type: Field
*Initial Conditions, type=FIELD, variable=1
Part-1-1.Base, 1.
** Name: frac_p   Type: Field
*Initial Conditions, type=FIELD, variable=2
Part-1-1.Base, 1.
** Name: last_field   Type: Field
*Initial Conditions, type=FIELD, variable=8
Part-1-1.All, 0.
** Name: temp1_weld   Type: Temperature
*Initial Conditions, type=TEMPERATURE
Part-1-1.Weld, 1500.
** Name: temp2_base   Type: Temperature
*Initial Conditions, type=TEMPERATURE
Part-1-1.Base, 20.
** ----------------------------------------------------------------
**
** STEP: Step1_Initial
**
*Step, name=Step1_Initial, nlgeom=NO
*Heat Transfer, end=PERIOD
1e-10, 1e-10, , ,
**
** INTERACTIONS
**
** Interaction: weld1
*Model Change, remove
Part-1-1.Weld1,
** Interaction: weld2
*Model Change, remove
Part-1-1.Weld2,
** Interaction: convection_heating1
*Sfilm, amplitude=Constant
outer_heating1, F, 20., 2.5e-05
** Interaction: radiation_heating1
*Sradiate, amplitude=Constant
outer_heating1, R, 20., 0.8
**
** CONTROLS
**
*Controls, reset
*Controls, parameters=time incrementation
20, 20, , , , , , , , ,
**
** OUTPUT REQUESTS
**
*Restart, write, frequency=0
**
** FIELD OUTPUT: F-Output-Intpoints
**
*Output, field, frequency=99999
*Element Output, directions=YES
FV,
**
** FIELD OUTPUT: F-Output-Nodes
**
*Node Output
NT,
*Element Output, position=AVERAGED AT NODES, directions=YES
FV,
*Output, history, frequency=0
*End Step
** ----------------------------------------------------------------
**
** STEP: Step2_Heating1
**
*Step, name=Step2_Heating1, nlgeom=NO, amplitude=RAMP, inc=100000
*Heat Transfer, end=PERIOD, deltmx=100.
0.01, 3., 1e-50, 0.1,
**
** BOUNDARY CONDITIONS
**
** Name: heating1 Type: Temperature
*Boundary
heating1, 11, 11, 1500.
**
** OUTPUT REQUESTS
**
*Restart, write, frequency=0
**
** FIELD OUTPUT: F-Output-Intpoints
**
*Output, field, frequency=99999
*Element Output, directions=YES
FV,
**
** FIELD OUTPUT: F-Output-Nodes
**
*Output, field, number interval=10
*Node Output
NT,
*Element Output, position=AVERAGED AT NODES, directions=YES
FV,
*Output, history, frequency=0
*End Step
** ----------------------------------------------------------------
**
** STEP: Step3_Insert1
**
*Step, name=Step3_Insert1, nlgeom=NO, inc=10000
*Heat Transfer, end=PERIOD, deltmx=50.
1e-10, 1e-10, 1e-15, 1e-10,
**
** INTERACTIONS
**
** Interaction: weld1
*Model Change, add
Part-1-1.Weld1,
** Interaction: convection_cooldown1
*Sfilm, amplitude=Constant, op=NEW
outer_cooldown1, F, 20., 2.5e-05
** Interaction: convection_heating1
*Sfilm, op=NEW
** Interaction: radiation_cooldown1
*Sradiate, op=NEW
outer_cooldown1, R, 20., 0.8
** Interaction: radiation_heating1
*Sradiate, op=NEW
**
** OUTPUT REQUESTS
**
*Restart, write, frequency=0
**
** FIELD OUTPUT: F-Output-Intpoints
**
*Output, field, frequency=99999
*Element Output, directions=YES
FV,
**
** FIELD OUTPUT: F-Output-Nodes
**
*Node Output
NT,
*Element Output, position=AVERAGED AT NODES, directions=YES
FV,
*Output, history, frequency=0
*End Step
** ----------------------------------------------------------------
**
** STEP: Step4_Cooldown1
**
*Step, name=Step4_Cooldown1, nlgeom=NO, inc=10000
*Heat Transfer, end=PERIOD, deltmx=50.
0.0001, 120., 1e-10, 120.,
**
** BOUNDARY CONDITIONS
**
** Name: heating1 Type: Temperature
*Boundary, op=NEW
**
** OUTPUT REQUESTS
**
*Restart, write, frequency=0
**
** FIELD OUTPUT: F-Output-Intpoints
**
*Output, field, frequency=99999
*Element Output, directions=YES
FV,
**
** FIELD OUTPUT: F-Output-Nodes
**
*Output, field, time points=TimePoints-1
*Node Output
NT,
*Element Output, position=AVERAGED AT NODES, directions=YES
FV,
*Output, history, frequency=0
*End Step
** ----------------------------------------------------------------
**
** STEP: Step5_Heating2
**
*Step, name=Step5_Heating2, nlgeom=NO, amplitude=RAMP, inc=10000
*Heat Transfer, end=PERIOD, deltmx=50.
0.01, 3., 1e-10, 3.,
**
** BOUNDARY CONDITIONS
**
** Name: heating2 Type: Temperature
*Boundary
heating2, 11, 11, 1500.
**
** INTERACTIONS
**
** Interaction: convection_cooldown1
*Sfilm, op=NEW
** Interaction: convection_heating2
*Sfilm, amplitude=Constant, op=NEW
outer_heating2, F, 20., 2.5e-05
** Interaction: radiation_cooldown1
*Sradiate, op=NEW
** Interaction: radiation_heating2
*Sradiate, amplitude=Constant, op=NEW
outer_heating2, R, 20., 0.8
**
** OUTPUT REQUESTS
**
*Restart, write, frequency=0
**
** FIELD OUTPUT: F-Output-Intpoints
**
*Output, field, frequency=99999
*Element Output, directions=YES
FV,
**
** FIELD OUTPUT: F-Output-Nodes
**
*Output, field, number interval=10
*Node Output
NT,
*Element Output, position=AVERAGED AT NODES, directions=YES
FV,
*Output, history, frequency=0
*End Step
** ----------------------------------------------------------------
**
** STEP: Step6_Insert2
**
*Step, name=Step6_Insert2, nlgeom=NO, inc=10000
*Heat Transfer, end=PERIOD, deltmx=50.
1e-10, 1e-10, 1e-15, 1e-10,
**
** INTERACTIONS
**
** Interaction: weld2
*Model Change, add
Part-1-1.Weld2,
** Interaction: convection_cooldown2
*Sfilm, amplitude=Constant, op=NEW
outer_cooldown2, F, 20., 2.5e-05
** Interaction: convection_heating2
*Sfilm, op=NEW
** Interaction: radiation_cooldown2
*Sradiate, op=NEW
outer_cooldown2, R, 20., 0.8
** Interaction: radiation_heating2
*Sradiate, op=NEW
**
** OUTPUT REQUESTS
**
*Restart, write, frequency=0
**
** FIELD OUTPUT: F-Output-Intpoints
**
*Output, field, frequency=99999
*Element Output, directions=YES
FV,
**
** FIELD OUTPUT: F-Output-Nodes
**
*Node Output
NT,
*Element Output, position=AVERAGED AT NODES, directions=YES
FV,
*Output, history, frequency=0
*End Step
** ----------------------------------------------------------------
**
** STEP: Step7_Cooldown2a
**
*Step, name=Step7_Cooldown2a, nlgeom=NO, inc=10000
*Heat Transfer, end=PERIOD, deltmx=5.
0.0001, 120., 1e-10, 10.,
**
** BOUNDARY CONDITIONS
**
** Name: heating2 Type: Temperature
*Boundary, op=NEW
**
** OUTPUT REQUESTS
**
*Restart, write, frequency=0
**
** FIELD OUTPUT: F-Output-Intpoints
**
*Output, field, frequency=99999
*Element Output, directions=YES
FV,
**
** FIELD OUTPUT: F-Output-Nodes
**
*Output, field, time points=TimePoints-1
*Node Output
NT,
*Element Output, position=AVERAGED AT NODES, directions=YES
FV,
*Output, history, frequency=0
*End Step
** ----------------------------------------------------------------
**
** STEP: Step8_Cooldown2b
**
*Step, name=Step8_Cooldown2b, nlgeom=NO, inc=10000
*Heat Transfer, end=PERIOD, deltmx=50.
10., 3600., 0.036, 20.,
**
** OUTPUT REQUESTS
**
*Restart, write, frequency=0
**
** FIELD OUTPUT: F-Output-Intpoints
**
*Output, field, frequency=99999
*Element Output, directions=YES
FV,
**
** FIELD OUTPUT: F-Output-Nodes
**
*Output, field, number interval=10
*Node Output
NT,
*Element Output, position=AVERAGED AT NODES, directions=YES
FV,
*Output, history, frequency=0
*End Step
